# OpenSim document version 30501
Model Hamner_optimized_2:
  gravity: 0 -9.80665 0
  length_units: meters
  force_units: N
  credits:
    Delp S.L., Loan J.P., Hoy M.G., Zajac F.E., Topp E.L., Rosen J.M., Thelen D.G., Anderson F.C., Seth A., Hamner S.R.
  publications:
    Notes: 3D, 23 DOF gait model created by D.G. Thelen, Univ. of Wisconsin-Madison, and Samuel Hamner, Ajay Seth, Frank C. Anderson, and Scott L. Delp, Stanford University. Lower extremity joint defintions based on Delp et al. (1990). Low back joint and anthropometry based on Anderson and Pandy (1999, 2001). Planar knee model of Yamaguchi and Zajac (1989). Seth removed the patella to avoid kinematic constraints; insertions of the quadrucepts are handled with moving points in the tibia frame. Hamner added arms adapted from Holzbaur et al., 2005. Hamner, S.R., Seth, A, Delp, S.L.: Muscle contributions to propulsion and support during running. Journal of Biomechanics, 2010. Delp, S.L., Loan, J.P., Hoy, M.G., Zajac, F.E., Topp E.L., Rosen, J.M.: An interactive graphics-based model of the lower extremity to study orthopaedic surgical procedures, IEEE Transactions on Biomedical Engineering, vol. 37, pp. 757-767, 1990. Yamaguchi G.T., Zajac F.E.: A planar model of the knee joint to characterize the knee extensor mechanism." J . Biomech. vol. 21. pp. 1-10. 1989. Anderson F.C., Pandy M.G.: A dynamic optimization solution for vertical jumping in three dimensions. Computer Methods in Biomechanics and Biomedical Engineering 2:201-231, 1999. Anderson F.C., Pandy M.G.: Dynamic optimization of human walking. Journal of Biomechanical Engineering 123:381-390, 2001. Holzbaur, KR, WM Murray and SL Delp, 2005. A model of the upper extremity for simulating musculoskeletal surgery and analyzing neuromuscular control. Ann Biomed Eng 33(6): 829-840.
  BodySet:
    Body ground: mass=0 [kg] mass_center=(0 0 0) inertia=(0 0 0 0 0 0)
    Body pelvis: mass=10.3254 mass_center=(-0.0699812 0 0) inertia=(0.0883059 0.0748195 0.0497365 0 0 0)
        meshes=(sacrum.vtp pelvis.vtp l_pelvis.vtp)
    Body femur_l: mass=8.154933 mass_center=(0 -0.179768 0) inertia=(0.131275 0.0344118 0.138431 0 0 0)
        meshes=femur_l.vtp
    Body tibia_l: mass=3.250523 mass_center=(0 -0.20717 0) inertia=(0.0544084 0.00550561 0.0551641 0 0 0)
        meshes=(tibia_l.vtp fibula_l.vtp)
    Body talus_l: mass=0.08767425 mass_center=(0 0 0) inertia=(0.00107953 0.00107953 0.00107953 0 0 0)
        meshes=talus_lv.vtp
    Body calcn_l: mass=1.095928 mass_center=(0.11 0.033 0) inertia=(0.0014852 0.00413735 0.00434952 0 0 0)
        meshes=l_foot.vtp
    Body toes_l: mass=0.1899024 mass_center=(0.03806 0.0066 0.01925) inertia=(0.000106086 0.000212172 0.00106086 0 0 0)
        meshes=l_bofoot.vtp
  JointSet:
    CustomJoint [values shared by the 6 below unless stated]: location_in_child=(0 0 0)
        orientation_in_child=(0 0 0) [radians]
    CustomJoint ground_pelvis: location_in_parent=(0 0 0)
      connectors:
        Connector_Body_ parent_body: connected_to_name=ground
        Connector_Body_ child_body: connected_to_name=pelvis
      Coordinate pelvis_tilt: motion_type=rotational default_value=0 range=(-1.570796 1.570796) clamped=true
      Coordinate pelvis_list: motion_type=rotational default_value=0 range=(-1.570796 1.570796) clamped=true
      Coordinate pelvis_rotation: motion_type=rotational default_value=0 range=(-1.570796 1.570796) clamped=true
      Coordinate pelvis_tx: motion_type=translational default_value=0 range=(-5 5) clamped=true
      Coordinate pelvis_ty: motion_type=translational default_value=0 range=(-1 2) clamped=true
      Coordinate pelvis_tz: motion_type=translational default_value=0 range=(-3 3) clamped=true
      SpatialTransform:
        TransformAxis rotation1: coordinates=pelvis_tilt axis=(0 0 1) LinearFunction(coefficients=1 0)
        TransformAxis rotation2: coordinates=pelvis_list axis=(1 0 0) LinearFunction(coefficients=1 0)
        TransformAxis rotation3: coordinates=pelvis_rotation axis=(0 1 0) LinearFunction(coefficients=1 0)
        TransformAxis translation1: coordinates=pelvis_tx axis=(1 0 0) LinearFunction(coefficients=1 0)
        TransformAxis translation2: coordinates=pelvis_ty axis=(0 1 0) LinearFunction(coefficients=1 0)
        TransformAxis translation3: coordinates=pelvis_tz axis=(0 0 1) LinearFunction(coefficients=1 0)
    CustomJoint hip_l: location_in_parent=(-0.06998123 -0.065428 -0.0826511)
      connectors:
        Connector_Body_ parent_body: connected_to_name=pelvis
        Connector_Body_ child_body: connected_to_name=femur_l
      Coordinate hip_flexion_l: motion_type=rotational default_value=0 range=(-0.594845 0.675885) clamped=true
      Coordinate hip_adduction_l: motion_type=rotational default_value=0 range=(-0.2685523 0.150905) clamped=true
      Coordinate hip_rotation_l: motion_type=rotational default_value=0 range=(-0.2206623 0.05579131) clamped=true
      SpatialTransform: axes_held_at_zero=(translation1 translation2 translation3)
        TransformAxis rotation1: coordinates=hip_flexion_l axis=(0 0 1) LinearFunction(coefficients=1 0)
        TransformAxis rotation2: coordinates=hip_adduction_l axis=(-1 0 0) LinearFunction(coefficients=1 0)
        TransformAxis rotation3: coordinates=hip_rotation_l axis=(0 -1 0) LinearFunction(coefficients=1 0)
    CustomJoint knee_l: location_in_parent=(0 0 0)
      connectors:
        Connector_Body_ parent_body: connected_to_name=femur_l
        Connector_Body_ child_body: connected_to_name=tibia_l
      Coordinate knee_angle_l: motion_type=rotational default_value=0 range=(-1.718928 0) clamped=true
      SpatialTransform: axes_held_at_zero=(rotation2 rotation3 translation3)
        TransformAxis rotation1: coordinates=knee_angle_l axis=(0 0 1) LinearFunction(coefficients=1 0)
        TransformAxis translation1: coordinates=knee_angle_l axis=(1 0 0)
          MultiplierFunction: scale=1.05746
            SimmSpline: x=(-2.0944 -1.74533 -1.39626 -1.0472 -0.698132 -0.349066 -0.174533 0.197344 0.337395 0.490178 1.52146 2.0944)
                y=(-0.0032 0.00179 0.00411 0.0041 0.00212 -0.001 -0.0031 -0.005227 -0.005435 -0.005574 -0.005435 -0.00525)
        TransformAxis translation2: coordinates=knee_angle_l axis=(0 1 0)
          MultiplierFunction: scale=1.05746
            SimmSpline: x=(-2.0944 -1.22173 -0.523599 -0.349066 -0.174533 0.159149 2.0944)
                y=(-0.4226 -0.4082 -0.399 -0.3976 -0.3966 -0.395264 -0.396)
    CustomJoint ankle_l: location_in_parent=(0 -0.4771448 0)
      connectors:
        Connector_Body_ parent_body: connected_to_name=tibia_l
        Connector_Body_ child_body: connected_to_name=talus_l
      Coordinate ankle_angle_l: motion_type=rotational default_value=0 range=(-0.5407901 0.4846631) clamped=true
      SpatialTransform: axes_held_at_zero=(rotation2 rotation3 translation1 translation2 translation3)
        TransformAxis rotation1: coordinates=ankle_angle_l axis=(0.1050135 0.1740224 0.9791263)
            LinearFunction(coefficients=1 0)
    CustomJoint subtalar_l: location_in_parent=(-0.0541171 -0.04654936 -0.008788342)
      connectors:
        Connector_Body_ parent_body: connected_to_name=talus_l
        Connector_Body_ child_body: connected_to_name=calcn_l
      Coordinate subtalar_angle_l: motion_type=rotational default_value=0 range=(-1.570796 1.570796) clamped=true
          locked=true
      SpatialTransform: axes_held_at_zero=(rotation2 rotation3 translation1 translation2 translation3)
        TransformAxis rotation1: coordinates=subtalar_angle_l axis=(-0.7871796 -0.6047475 -0.1209495)
            LinearFunction(coefficients=1 0)
    CustomJoint mtp_l: location_in_parent=(0.19668 -0.0022 -0.001188)
      connectors:
        Connector_Body_ parent_body: connected_to_name=calcn_l
        Connector_Body_ child_body: connected_to_name=toes_l
      Coordinate mtp_angle_l: motion_type=rotational default_value=0 range=(-1.047198 1.047198) clamped=true
          locked=true
      SpatialTransform: axes_held_at_zero=(rotation2 rotation3 translation1 translation2 translation3)
        TransformAxis rotation1: coordinates=mtp_angle_l axis=(0.5809544 0 0.8139361) LinearFunction(coefficients=1 0)
  ForceSet:
    Thelen2003Muscle [values shared by the 43 below unless stated]: activation_time_constant=0.01
        deactivation_time_constant=0.04 FmaxTendonStrain=0.033 FmaxMuscleStrain=0.6 KshapeActive=0.5 KshapePassive=4
        Af=0.3 Flen=1.8
    Thelen2003Muscle glut_med1_l: max_isometric_force=819 optimal_fiber_length=0.05583014
        tendon_slack_length=0.07694963 pennation_angle_at_optimal=0.1396263 [radians]
      PathPoint P1: pelvis (-0.0403852 0.0300909 -0.119671)
      PathPoint P2: femur_l (-0.0230526 -0.0123723 -0.058689)
    Thelen2003Muscle glut_med2_l: max_isometric_force=573 optimal_fiber_length=0.08805933
        tendon_slack_length=0.05065211 pennation_angle_at_optimal=0
      PathPoint P1: pelvis (-0.0846308 0.0440476 -0.0758212)
      PathPoint P2: femur_l (-0.0272825 -0.00613327 -0.0557281)
    Thelen2003Muscle glut_med3_l: max_isometric_force=653 optimal_fiber_length=0.06708764
        tendon_slack_length=0.05193369 pennation_angle_at_optimal=0.3316126
      PathPoint P1: pelvis (-0.121057 0.0103933 -0.0641412)
      PathPoint P2: femur_l (-0.0326755 -0.00497006 -0.0547764)
    Thelen2003Muscle glut_min1_l: max_isometric_force=270 optimal_fiber_length=0.06990178
        tendon_slack_length=0.01570211 pennation_angle_at_optimal=0.1745329
      PathPoint P1: pelvis (-0.0462252 -0.00791867 -0.104526)
      PathPoint P2: femur_l (-0.00761371 -0.0109976 -0.0592178)
    Thelen2003Muscle glut_min2_l: max_isometric_force=285 optimal_fiber_length=0.05737954
        tendon_slack_length=0.02640631 pennation_angle_at_optimal=0
      PathPoint P1: pelvis (-0.0626565 -0.00643392 -0.0980925)
      PathPoint P2: femur_l (-0.0101516 -0.0109976 -0.0592178)
    Thelen2003Muscle glut_min3_l: max_isometric_force=323 optimal_fiber_length=0.03892437
        tendon_slack_length=0.05204749 pennation_angle_at_optimal=0.01745329
      PathPoint P1: pelvis (-0.0825521 -0.00623595 -0.0847298)
      PathPoint P2: femur_l (-0.0142757 -0.00877692 -0.0581603)
    Thelen2003Muscle semimem_l: max_isometric_force=1288 optimal_fiber_length=0.08363066 tendon_slack_length=0.3822285
        pennation_angle_at_optimal=0.2617994
      PathPoint P1: pelvis (-0.117988 -0.0964791 -0.070783)
      ConditionalPathPoint P2: tibia_l (-0.0386154 -0.0390482 0.0209833) range=(-0.558505 0.174533)
          coordinate=knee_angle_l
      PathPoint P3: tibia_l (-0.0299603 -0.0529409 0.0217156)
    Thelen2003Muscle semiten_l: max_isometric_force=410 optimal_fiber_length=0.2113474 tendon_slack_length=0.2767947
        pennation_angle_at_optimal=0.08726646
      PathPoint P1: pelvis (-0.125065 -0.108763 -0.059776)
      ConditionalPathPoint P2: tibia_l (-0.0466381 -0.0317246 0.0252665) range=(-0.331613 0.174533)
          coordinate=knee_angle_l
      PathPoint P3: tibia_l (-0.0368622 -0.0586111 0.0253885)
      PathPoint P4: tibia_l (-0.0125389 -0.0827791 0.0271862)
      PathPoint P5: tibia_l (0.00299603 -0.106081 0.021416)
    Thelen2003Muscle bifemlh_l: max_isometric_force=896 optimal_fiber_length=0.1121656 tendon_slack_length=0.3495109
        pennation_angle_at_optimal=0
      PathPoint P1: pelvis (-0.124679 -0.101527 -0.068734)
      PathPoint P2: tibia_l (-0.0334001 -0.039947 -0.0326567)
      PathPoint P3: tibia_l (-0.0259656 -0.0624727 -0.0380606)
    Thelen2003Muscle bifemsh_l: max_isometric_force=804 optimal_fiber_length=0.1952438 tendon_slack_length=0.08686962
        pennation_angle_at_optimal=0.4014257
      PathPoint P1: femur_l (0.0052873 -0.22323 -0.0247446)
      PathPoint P2: tibia_l (-0.0334001 -0.039947 -0.0326567)
      PathPoint P3: tibia_l (-0.0259656 -0.0624727 -0.0380606)
    Thelen2003Muscle sar_l: max_isometric_force=156 optimal_fiber_length=0.5258128 tendon_slack_length=0.1256578
        pennation_angle_at_optimal=0
      PathPoint P1: pelvis (-0.0151445 -0.00128678 -0.122937)
      PathPoint P2: femur_l (-0.00317238 -0.377302 0.0445191)
      PathPoint P3: tibia_l (-0.00621398 -0.0464939 0.0442746)
      PathPoint P4: tibia_l (0.00665783 -0.0653577 0.0424992)
      PathPoint P5: tibia_l (0.0269642 -0.0932097 0.0279629)
    Thelen2003Muscle add_long_l: max_isometric_force=627 optimal_fiber_length=0.137187 tendon_slack_length=0.1215473
        pennation_angle_at_optimal=0.1047198
      PathPoint P1: pelvis (-0.0312787 -0.0827501 -0.0167282)
      PathPoint P2: femur_l (0.0052873 -0.22323 -0.0247446)
    Thelen2003Muscle add_brev_l: max_isometric_force=429 optimal_fiber_length=0.1336542 tendon_slack_length=0.02502325
        pennation_angle_at_optimal=0
      PathPoint P1: pelvis (-0.0581032 -0.0905698 -0.0162333)
      PathPoint P2: femur_l (0.000951714 -0.126472 -0.0310893)
    Thelen2003Muscle add_mag1_l: max_isometric_force=381 optimal_fiber_length=0.08691125 tendon_slack_length=0.0656289
        pennation_angle_at_optimal=0.08726646
      PathPoint P1: pelvis (-0.0724558 -0.116206 -0.0252408)
      PathPoint P2: femur_l (-0.00475857 -0.128058 -0.0358479)
    Thelen2003Muscle add_mag2_l: max_isometric_force=343 optimal_fiber_length=0.1188694 tendon_slack_length=0.1337255
        pennation_angle_at_optimal=0.05235988
      PathPoint P1: pelvis (-0.0822552 -0.117988 -0.0304869)
      PathPoint P2: femur_l (0.00571028 -0.24163 -0.0240043)
    Thelen2003Muscle add_mag3_l: max_isometric_force=488 optimal_fiber_length=0.1285549 tendon_slack_length=0.2722107
        pennation_angle_at_optimal=0.08726646
      PathPoint P1: pelvis (-0.109951 -0.11297 -0.0483237)
      PathPoint P2: femur_l (0.00740222 -0.405747 0.0281284)
    Thelen2003Muscle tfl_l: max_isometric_force=233 optimal_fiber_length=0.09695963 tendon_slack_length=0.4499538
        pennation_angle_at_optimal=0.05235988
      PathPoint P1: pelvis (-0.0307838 0.0211824 -0.122838)
      PathPoint P2: femur_l (0.0310893 -0.105217 -0.0631304)
      PathPoint P3: femur_l (0.00571028 -0.428166 -0.0377513)
      PathPoint P4: tibia_l (0.00665783 -0.0540394 -0.0329563)
    Thelen2003Muscle pect_l: max_isometric_force=266 optimal_fiber_length=0.1005112 tendon_slack_length=0.03673296
        pennation_angle_at_optimal=0
      PathPoint P1: pelvis (-0.0426618 -0.0760192 -0.0446415)
      PathPoint P2: femur_l (-0.012901 -0.0869232 -0.0267537)
    Thelen2003Muscle grac_l: max_isometric_force=162 optimal_fiber_length=0.3852824 tendon_slack_length=0.1284615
        pennation_angle_at_optimal=0.05235988
      PathPoint P1: pelvis (-0.0732576 -0.117493 -0.0276559)
      ConditionalPathPoint P2: tibia_l (-0.0294831 -0.0353975 0.0418778) range=(-0.436332 0.174533)
          coordinate=knee_angle_l
      PathPoint P3: tibia_l (-0.0215603 -0.0571797 0.0397251)
      PathPoint P4: tibia_l (0.00665783 -0.0927658 0.0252998)
    Thelen2003Muscle glut_max1_l: max_isometric_force=573 optimal_fiber_length=0.1473368 tendon_slack_length=0.124893
        pennation_angle_at_optimal=0.08726646
      PathPoint P1: pelvis (-0.118285 0.0605778 -0.0692883)
      PathPoint P2: pelvis (-0.127788 0.0011878 -0.0876993)
      PathPoint P3: femur_l (-0.0483259 -0.026225 -0.0414524)
      PathPoint P4: femur_l (-0.0292916 -0.0598522 -0.0497006)
    Thelen2003Muscle glut_max2_l: max_isometric_force=819 optimal_fiber_length=0.1490813 tendon_slack_length=0.1305455
        pennation_angle_at_optimal=0
      PathPoint P1: pelvis (-0.133529 0.0174211 -0.0557276)
      PathPoint P2: pelvis (-0.136201 -0.0514713 -0.0904708)
      PathPoint P3: femur_l (-0.0450478 -0.0560454 -0.0309836)
      PathPoint P4: femur_l (-0.0164964 -0.107438 -0.0443076)
    Thelen2003Muscle glut_max3_l: max_isometric_force=552 optimal_fiber_length=0.1459877 tendon_slack_length=0.1491394
        pennation_angle_at_optimal=0.08726646
      PathPoint P1: pelvis (-0.154018 -0.0310808 -0.00574103)
      PathPoint P2: pelvis (-0.151346 -0.10413 -0.0398903)
      PathPoint P3: femur_l (-0.0316181 -0.110082 -0.0142757)
      PathPoint P4: femur_l (-0.00634476 -0.150054 -0.0434616)
    Thelen2003Muscle iliacus_l: max_isometric_force=1073 optimal_fiber_length=0.1007126 tendon_slack_length=0.101374
        pennation_angle_at_optimal=0.1221731
      PathPoint P1: pelvis (-0.0667148 0.0361289 -0.0845318)
      PathPoint P2: pelvis (-0.0255377 -0.0544408 -0.0802755)
      ConditionalPathPoint P3: pelvis (-0.0285072 -0.0796816 -0.0807704) range=(-1.5708 0.785398)
          coordinate=hip_flexion_l
      PathPoint P4: femur_l (0.00179768 -0.0574201 -0.00602752)
      PathPoint P5: femur_l (-0.020409 -0.0656683 -0.0136412)
    Thelen2003Muscle psoas_l: max_isometric_force=1113 optimal_fiber_length=0.1011317 tendon_slack_length=0.1601766
        pennation_angle_at_optimal=0.1396263
      PathPoint P1: pelvis (-0.0640422 0.0877982 -0.0286062)
      PathPoint P2: pelvis (-0.023558 -0.0564205 -0.0751284)
      ConditionalPathPoint P3: pelvis (-0.0285072 -0.0796816 -0.0807704) range=(-1.5708 0.785398)
          coordinate=hip_flexion_l
      PathPoint P4: femur_l (0.00169194 -0.0536132 -0.00401835)
      PathPoint P5: femur_l (-0.0198802 -0.0631304 -0.0109976)
    Thelen2003Muscle quad_fem_l: max_isometric_force=381 optimal_fiber_length=0.05557794 tendon_slack_length=0.02385503
        pennation_angle_at_optimal=0
      PathPoint P1: pelvis (-0.113138 -0.11393 -0.0514713)
      PathPoint P2: femur_l (-0.0402892 -0.0379628 -0.038703)
    Thelen2003Muscle gem_l: max_isometric_force=164 optimal_fiber_length=0.02453211 tendon_slack_length=0.03997601
        pennation_angle_at_optimal=0
      PathPoint P1: pelvis (-0.112148 -0.0811664 -0.0706741)
      PathPoint P2: femur_l (-0.0150159 -0.00348962 -0.0468455)
    Thelen2003Muscle peri_l: max_isometric_force=444 optimal_fiber_length=0.02692571 tendon_slack_length=0.1149393
        pennation_angle_at_optimal=0.1745329
      PathPoint P1: pelvis (-0.138181 0.00029695 -0.0232611)
      PathPoint P2: pelvis (-0.118087 -0.0273194 -0.0650321)
      PathPoint P3: femur_l (-0.0156504 -0.00380686 -0.046211)
    Thelen2003Muscle rect_fem_l: max_isometric_force=1169 optimal_fiber_length=0.1199297 tendon_slack_length=0.3270687
        pennation_angle_at_optimal=0.08726646
      PathPoint P1: pelvis (-0.0292001 -0.0307838 -0.0958159)
      ConditionalPathPoint P2: femur_l (0.0353192 -0.426156 -0.00200917) range=(-2.61799 -1.45997)
          coordinate=knee_angle_l
      MovingPathPoint P3: tibia_l (0.0685286 0.0232847 -0.00155349) x_coordinate=knee_angle_l y_coordinate=knee_angle_l
          z_coordinate=knee_angle_l
        x_location: MultiplierFunction: scale=1.109639
          SimmSpline: x=(-2.0944 -1.99997 -1.5708 -1.45752 -1.39626 -1.0472 -0.698132 -0.526391 -0.349066 -0.174533 0 0.00017453 0.00034907 0.0279253 0.0872665 0.174533 2.0944)
              y=(0.0155805 0.0179938 0.0275081 0.0296564 0.0307615 0.0365695 0.0422074 0.0450902 0.048391 0.0534299 0.0617576 0.0617669 0.0617762 0.0633083 0.066994 0.0733035 0.0573481)
        y_location: MultiplierFunction: scale=1.109639
          SimmSpline: x=(-2.0944 -1.99997 -1.5708 -1.45752 -1.39626 -1.0472 -0.698132 -0.526391 -0.349066 -0.174533 0 0.00017453 0.00034907 0.0279253 0.0872665 0.174533 2.0944)
              y=(0.0234116 0.0237613 0.0251141 0.0252795 0.0253146 0.0249184 0.0242373 0.0238447 0.0234197 0.0227644 0.020984 0.0209814 0.0209788 0.0205225 0.0191754 0.0159554 -0.0673774)
        z_location: MultiplierFunction: scale=1.109639
          SimmSpline: x=(-2.0944 0.1745) y=(-0.0014 -0.0014)
    Thelen2003Muscle vas_med_l: max_isometric_force=1294 optimal_fiber_length=0.09602348 tendon_slack_length=0.1320746
        pennation_angle_at_optimal=0.08726646
      PathPoint P1: femur_l (0.0148044 -0.221961 -0.0198802)
      PathPoint P2: femur_l (0.0376456 -0.292811 -0.000951714)
      ConditionalPathPoint P3: femur_l (0.039126 -0.42806 0.0132183) range=(-2.61799 -1.21004) coordinate=knee_angle_l
      ConditionalPathPoint P4: femur_l (0.0289744 -0.449949 0.0138527) range=(-2.61799 -1.78006)
          coordinate=knee_angle_l
      MovingPathPoint P5: tibia_l (0.0620939 0.0241809 0.0162007) x_coordinate=knee_angle_l y_coordinate=knee_angle_l
          z_coordinate=knee_angle_l
        x_location: MultiplierFunction: scale=1.109639
          SimmSpline: x=(-2.0944 -1.99997 -1.5708 -1.45752 -1.39626 -1.0472 -0.698132 -0.526391 -0.349066 -0.174533 0 0.00017453 0.00034907 0.0279253 0.0872665 0.174533 2.0944)
              y=(0.00981097 0.0122243 0.0217371 0.0238851 0.0249902 0.0307959 0.0364187 0.0392871 0.0425654 0.0475764 0.0559586 0.0559681 0.0559776 0.0575419 0.0613368 0.0679503 0.0629332)
        y_location: MultiplierFunction: scale=1.109639
          SimmSpline: x=(-2.0944 -1.99997 -1.5708 -1.45752 -1.39626 -1.0472 -0.698132 -0.526391 -0.349066 -0.174533 0 0.00017453 0.00034907 0.0279253 0.0872665 0.174533 2.0944)
              y=(0.0224154 0.0227651 0.0241265 0.0242933 0.0243287 0.0239462 0.0233593 0.0230677 0.0228342 0.0226362 0.0217917 0.0217903 0.0217889 0.0215365 0.0206842 0.0183269 -0.0656205)
        z_location: MultiplierFunction: scale=1.109639
          SimmSpline: x=(-2.0944 2.0944) y=(0.0146 0.0146)
    Thelen2003Muscle vas_int_l: max_isometric_force=1365 optimal_fiber_length=0.09447156 tendon_slack_length=0.1420925
        pennation_angle_at_optimal=0.05235988
      PathPoint P1: femur_l (0.0306663 -0.203455 -0.0327813)
      PathPoint P2: femur_l (0.0354249 -0.220375 -0.0301376)
      ConditionalPathPoint P3: femur_l (0.0362709 -0.426156 -0.00581603) range=(-2.61799 -1.42) coordinate=knee_angle_l
      MovingPathPoint P4: tibia_l (0.0685286 0.0232847 -0.00155349) x_coordinate=knee_angle_l y_coordinate=knee_angle_l
          z_coordinate=knee_angle_l
        x_location: MultiplierFunction: scale=1.109639
          SimmSpline: x=(-2.0944 -1.99997 -1.5708 -1.45752 -1.39626 -1.0472 -0.698132 -0.526391 -0.349066 -0.174533 0 0.00017453 0.00034907 0.0279253 0.0872665 0.174533 2.0944)
              y=(0.0155805 0.0179938 0.0275081 0.0296564 0.0307615 0.0365695 0.0422074 0.0450902 0.048391 0.0534299 0.0617576 0.0617669 0.0617762 0.0633083 0.066994 0.0733035 0.0573481)
        y_location: MultiplierFunction: scale=1.109639
          SimmSpline: x=(-2.0944 -1.99997 -1.5708 -1.45752 -1.39626 -1.0472 -0.698132 -0.526391 -0.349066 -0.174533 0 0.00017453 0.00034907 0.0279253 0.0872665 0.174533 2.0944)
              y=(0.0234116 0.0237613 0.0251141 0.0252795 0.0253146 0.0249184 0.0242373 0.0238447 0.0234197 0.0227644 0.020984 0.0209814 0.0209788 0.0205225 0.0191754 0.0159554 -0.0673774)
        z_location: MultiplierFunction: scale=1.109639
          SimmSpline: x=(-2.0944 0.1745) y=(-0.0014 -0.0014)
    Thelen2003Muscle vas_lat_l: max_isometric_force=1871 optimal_fiber_length=0.09072919 tendon_slack_length=0.1649769
        pennation_angle_at_optimal=0.08726646
      PathPoint P1: femur_l (0.00507581 -0.196053 -0.0369054)
      PathPoint P2: femur_l (0.0284457 -0.273988 -0.0432501)
      ConditionalPathPoint P3: femur_l (0.0381743 -0.426156 -0.0216779) range=(-2.61799 -1.21004)
          coordinate=knee_angle_l
      ConditionalPathPoint P4: femur_l (0.0267537 -0.44868 -0.0194573) range=(-2.61799 -1.92004)
          coordinate=knee_angle_l
      MovingPathPoint P5: tibia_l (0.0665292 0.0217338 -0.018309) x_coordinate=knee_angle_l y_coordinate=knee_angle_l
          z_coordinate=knee_angle_l
        x_location: MultiplierFunction: scale=1.109639
          SimmSpline: x=(-2.0944 -1.99997 -1.5708 -1.45752 -1.39626 -1.0472 -0.698132 -0.526391 -0.349066 -0.174533 0 0.00017453 0.00034907 0.0279253 0.0872665 0.174533 2.0944)
              y=(0.0142897 0.016703 0.0262145 0.0283623 0.0294674 0.0352709 0.0408785 0.0437291 0.0469704 0.0518742 0.0599557 0.0599647 0.0599738 0.0614577 0.0650351 0.0711867 0.0583766)
        y_location: MultiplierFunction: scale=1.109639
          SimmSpline: x=(-2.0944 -1.99997 -1.5708 -1.45752 -1.39626 -1.0472 -0.698132 -0.526391 -0.349066 -0.174533 0 0.00017453 0.00034907 0.0279253 0.0872665 0.174533 2.0944)
              y=(0.0215318 0.0218815 0.0232362 0.0234019 0.0234371 0.0230439 0.0223842 0.0220151 0.0216359 0.0210971 0.0195864 0.0195842 0.019582 0.01919 0.018008 0.0151073 -0.0653421)
        z_location: MultiplierFunction: scale=1.109639
          SimmSpline: x=(-2.0944 2.0944) y=(-0.0165 -0.0165)
    Thelen2003Muscle med_gas_l: max_isometric_force=1558 optimal_fiber_length=0.06538683 tendon_slack_length=0.4340992
        pennation_angle_at_optimal=0.296706
      PathPoint P1: femur_l (-0.0200917 -0.415476 0.0248503)
      ConditionalPathPoint P2: femur_l (-0.0317238 -0.42531 0.0272825) range=(-0.785398 0.174533)
          coordinate=knee_angle_l
      PathPoint P3: calcn_l (0 0.0341 0.00583)
    Thelen2003Muscle lat_gas_l: max_isometric_force=683 optimal_fiber_length=0.06976792 tendon_slack_length=0.4232807
        pennation_angle_at_optimal=0.1396263
      PathPoint P1: femur_l (-0.0232641 -0.417274 -0.0287629)
      ConditionalPathPoint P2: femur_l (-0.0317238 -0.424887 -0.0289744) range=(-0.785398 0.174533)
          coordinate=knee_angle_l
      PathPoint P3: calcn_l (0 0.0341 0.00583)
    Thelen2003Muscle soleus_l: max_isometric_force=3549 optimal_fiber_length=0.05537747 tendon_slack_length=0.2777606
        pennation_angle_at_optimal=0.4363323
      PathPoint P1: tibia_l (-0.00266313 -0.170108 -0.00787844)
      PathPoint P2: calcn_l (0 0.0341 0.00583)
    Thelen2003Muscle tib_post_l: max_isometric_force=1588 optimal_fiber_length=0.03524053 tendon_slack_length=0.3431886
        pennation_angle_at_optimal=0.2094395
      PathPoint P1: tibia_l (-0.0104306 -0.149579 -0.00210831)
      PathPoint P2: tibia_l (-0.0159788 -0.449515 0.0254107)
      PathPoint P3: calcn_l (0.04587 0.03674 0.03146)
      PathPoint P4: calcn_l (0.08492 0.01749 0.03091)
    Thelen2003Muscle flex_dig_l: max_isometric_force=310 optimal_fiber_length=0.03892314 tendon_slack_length=0.4414567
        pennation_angle_at_optimal=0.1221731
      PathPoint P1: tibia_l (-0.00921 -0.227032 0.00199735)
      PathPoint P2: tibia_l (-0.0170884 -0.449515 0.0217489)
      PathPoint P3: calcn_l (0.04796 0.03465 0.0308)
      PathPoint P4: calcn_l (0.07788 0.01936 0.02893)
      PathPoint P5: calcn_l (0.18238 -0.00891 -0.01276)
      PathPoint P6: toes_l (-0.00209 -0.00858 -0.01617)
      PathPoint P7: toes_l (0.03135 -0.00781 -0.02365)
      PathPoint P8: toes_l (0.04851 -0.0066 -0.02662)
    Thelen2003Muscle flex_hal_l: max_isometric_force=322 optimal_fiber_length=0.048404 tendon_slack_length=0.4195052
        pennation_angle_at_optimal=0.1745329
      PathPoint P1: tibia_l (-0.00876615 -0.25899 -0.0270752)
      PathPoint P2: tibia_l (-0.0206393 -0.452622 0.0193077)
      PathPoint P3: calcn_l (0.04114 0.03036 0.02651)
      PathPoint P4: calcn_l (0.11418 0.00748 0.02816)
      PathPoint P5: calcn_l (0.18986 -0.00583 0.02959)
      PathPoint P6: toes_l (0.01705 -0.00704 0.02915)
      PathPoint P7: toes_l (0.06182 -0.01122 0.01991)
    Thelen2003Muscle tib_ant_l: max_isometric_force=905 optimal_fiber_length=0.1083616 tendon_slack_length=0.2472845
        pennation_angle_at_optimal=0.08726646
      PathPoint P1: tibia_l (0.0198625 -0.180205 -0.0127608)
      PathPoint P2: tibia_l (0.0365071 -0.438418 0.0196406)
      PathPoint P3: calcn_l (0.12826 0.01958 0.03355)
    Thelen2003Muscle per_brev_l: max_isometric_force=435 optimal_fiber_length=0.05887983 tendon_slack_length=0.1754079
        pennation_angle_at_optimal=0.08726646
      PathPoint P1: tibia_l (-0.00776747 -0.293611 -0.0360633)
      PathPoint P2: tibia_l (-0.0219709 -0.464273 -0.0314028)
      PathPoint P3: tibia_l (-0.0159788 -0.47659 -0.0320686)
      PathPoint P4: calcn_l (0.05181 0.0297 -0.02563)
      PathPoint P5: calcn_l (0.07447 0.02409 -0.03773)
    Thelen2003Muscle per_long_l: max_isometric_force=943 optimal_fiber_length=0.05593112 tendon_slack_length=0.3806318
        pennation_angle_at_optimal=0.1745329
      PathPoint P1: tibia_l (0.00055482 -0.173991 -0.0401689)
      PathPoint P2: tibia_l (-0.0229695 -0.466603 -0.0317357)
      PathPoint P3: tibia_l (-0.0179762 -0.479253 -0.0320686)
      PathPoint P4: calcn_l (0.04818 0.0253 -0.02431)
      PathPoint P5: calcn_l (0.07491 0.01166 -0.03124)
      PathPoint P6: calcn_l (0.09372 0.00759 -0.01298)
      PathPoint P7: calcn_l (0.13233 0.00935 0.02024)
    Thelen2003Muscle per_tert_l: max_isometric_force=180 optimal_fiber_length=0.08704378 tendon_slack_length=0.1113526
        pennation_angle_at_optimal=0.2268928
      PathPoint P1: tibia_l (0.00110964 -0.311143 -0.0256327)
      PathPoint P2: tibia_l (0.0254107 -0.451512 -0.0176433)
      PathPoint P3: calcn_l (0.09427 0.02508 -0.03289)
    Thelen2003Muscle ext_dig_l: max_isometric_force=512 optimal_fiber_length=0.1120298 tendon_slack_length=0.3824235
        pennation_angle_at_optimal=0.1396263
      PathPoint P1: tibia_l (0.00355085 -0.153241 -0.030626)
      PathPoint P2: tibia_l (0.0320686 -0.444632 -0.0079894)
      PathPoint P3: calcn_l (0.10142 0.04268 0.00011)
      PathPoint P4: calcn_l (0.17776 0.00605 -0.0143)
      PathPoint P5: toes_l (0.00033 0.00517 -0.01683)
      PathPoint P6: toes_l (0.04873 -0.00044 -0.0275)
    Thelen2003Muscle ext_hal_l: max_isometric_force=162 optimal_fiber_length=0.1221984 tendon_slack_length=0.3378155
        pennation_angle_at_optimal=0.1047198
      PathPoint P1: tibia_l (0.00133157 -0.196073 -0.0252998)
      PathPoint P2: tibia_l (0.0361742 -0.442191 0.00943193)
      PathPoint P3: calcn_l (0.1067 0.04279 0.02321)
      PathPoint P4: calcn_l (0.14223 0.03399 0.02827)
      PathPoint P5: calcn_l (0.19074 0.01529 0.0308)
      PathPoint P6: toes_l (0.03278 0.00451 0.02695)
      PathPoint P7: toes_l (0.06193 0.00374 0.02046)
    ObjectGroup L_hip_abd: members=(glut_max1_l glut_med1_l glut_med2_l glut_med3_l glut_min1_l glut_min2_l glut_min3_l peri_l sar_l tfl_l)
    ObjectGroup L_hip_flex: members=(add_brev_l add_long_l glut_med1_l glut_min1_l grac_l iliacus_l pect_l psoas_l rect_fem_l sar_l tfl_l)
    ObjectGroup L_hip_inrot: members=(glut_med1_l glut_min1_l iliacus_l psoas_l tfl_l)
    ObjectGroup L_hip_exrot: members=(gem_l glut_med3_l glut_min3_l peri_l quad_fem_l)
    ObjectGroup L_hip_ext: members=(add_long_l add_mag1_l add_mag2_l add_mag3_l bifemlh_l glut_max1_l glut_max2_l glut_max3_l glut_med3_l glut_min3_l semimem_l semiten_l)
    ObjectGroup L_hip_add: members=(add_brev_l add_long_l add_mag1_l add_mag2_l add_mag3_l bifemlh_l grac_l pect_l semimem_l semiten_l)
    ObjectGroup L_knee_bend: members=(bifemlh_l bifemsh_l grac_l lat_gas_l med_gas_l sar_l semimem_l semiten_l)
    ObjectGroup L_knee_ext: members=(rect_fem_l vas_int_l vas_lat_l vas_med_l)
    ObjectGroup L_ankle_pf: members=(flex_dig_l flex_hal_l lat_gas_l med_gas_l per_brev_l per_long_l soleus_l tib_post_l)
    ObjectGroup L_inverter: members=(ext_hal_l flex_dig_l flex_hal_l tib_ant_l tib_post_l)
    ObjectGroup L_ankle_df: members=(ext_dig_l ext_hal_l per_tert_l tib_ant_l)
    ObjectGroup L_everter: members=(ext_dig_l per_brev_l per_long_l per_tert_l)
