# OpenSim document version 30000
Model generic_female_model:
  length_units: meters
  force_units: N
  gravity: 0 -9.80665 0
  credits:
    Frank Anderson, Peter Loan, Ayman Habib, Ajay Seth, Michael Sherman
  BodySet:
    Body ground: mass=0 mass_center=(0 0 0) inertia_xx=1 inertia_yy=1 inertia_zz=1
    Body pelvis: mass=956260 mass_center=(0.238886 0.266925 -0.371032) inertia_xx=0.00296468 inertia_yy=0.00292577
        inertia_zz=0.00152181 inertia_xy=1.14283e-5 inertia_xz=8.97837e-5 inertia_yz=-1.88789e-5
        meshes=(S032_C_B000_CTA_Sacrum.vtp S032_L_B000_CTA_Iliac.vtp S032_R_B000_CTA_Iliac.vtp)
      CustomJoint pelvisToground: parent_body=ground location_in_parent=(0 0 0) location=(0.238855 0.180177 -0.357605)
          orientation=(-2.77372 -1.56193 1.80849)
        Coordinate xRotation: motion_type=rotational range=(-0.7853982 0.7853982)
        Coordinate yRotation: motion_type=rotational range=(-0.7853982 0.7853982)
        Coordinate zRotation: motion_type=rotational range=(-0.7853982 0.7853982)
        Coordinate xTranslation: motion_type=translational range=(-0.5 0.5)
        Coordinate yTranslation: motion_type=translational range=(-0.5 0.5)
        Coordinate zTranslation: motion_type=translational range=(-0.5 0.5)
        SpatialTransform:
          TransformAxis rotation1: coordinates=xRotation axis=(1 0 0) LinearFunction(coefficients=1 0)
          TransformAxis rotation2: coordinates=yRotation axis=(0 1 0) LinearFunction(coefficients=1 0)
          TransformAxis rotation3: coordinates=zRotation axis=(0 0 1) LinearFunction(coefficients=1 0)
          TransformAxis translation1: coordinates=xTranslation axis=(1 0 0) LinearFunction(coefficients=1 0)
          TransformAxis translation2: coordinates=yTranslation axis=(0 1 0) LinearFunction(coefficients=1 0)
          TransformAxis translation3: coordinates=zTranslation axis=(0 0 1) LinearFunction(coefficients=1 0)
    Body femur_r: mass=546967 mass_center=(0.119785 0.251966 -0.733366) inertia_xx=0.0127838 inertia_yy=0.0128105
        inertia_zz=0.000283792 inertia_xy=-1.39135e-5 inertia_xz=-0.000103368 inertia_yz=-0.00064032
        meshes=(S032_R_B000_CTA_Femur.vtp S032_R_B000_CTA_Patella.vtp)
      CustomJoint hip_r: parent_body=pelvis location_in_parent=(0.143478 0.243439 -0.43267)
          orientation_in_parent=(-2.77372 -1.56193 1.80849) location=(0.143478 0.243439 -0.432669)
          orientation=(-0.806673 -1.45075 -2.47682)
        Coordinate hip_flexion_r: motion_type=rotational range=(-0.3490659 1.745329)
        Coordinate hip_adduction_r: motion_type=rotational range=(-0.6981317 0.1745329)
        Coordinate hip_rotation_r: motion_type=rotational range=(-0.6981317 0.6981317)
        SpatialTransform: axes_held_at_zero=(translation1 translation2 translation3)
          TransformAxis rotation1: coordinates=hip_flexion_r axis=(0 0 1) LinearFunction(coefficients=1 0)
          TransformAxis rotation2: coordinates=hip_adduction_r axis=(1 0 0) LinearFunction(coefficients=1 0)
          TransformAxis rotation3: coordinates=hip_rotation_r axis=(0 1 0) LinearFunction(coefficients=1 0)
    Body tibia_r: mass=410386 mass_center=(0.109108 0.308024 -1.01971) inertia_xx=0.0059606 inertia_yy=0.0059739
        inertia_zz=0.000124729 inertia_xy=9.3379e-6 inertia_xz=-0.000147917 inertia_yz=-0.000290314
        meshes=(S032_R_B000_CTA_Tibia.vtp S032_R_B000_CTA_Fibula.vtp)
      WeldJoint tibia_rTofemur_r: parent_body=femur_r location_in_parent=(0.123249 0.283287 -0.827173)
          orientation_in_parent=(-0.806673 -1.45075 -2.47682) location=(0.123249 0.283287 -0.827173)
          orientation=(-0.806673 -1.45075 -2.47682)
  ForceSet:
    Schutte1993Muscle_Deprecated [values shared by the 27 below unless stated]: min_control=0 max_control=1
        max_isometric_force=1000 max_contraction_velocity=10
    Schutte1993Muscle_Deprecated add_brev_r: optimal_fiber_length=0.1097318 tendon_slack_length=0.04084905
        pennation_angle_at_optimal=0.1064651 [radians]
      PathPoint add_brev_r_ori : pelvis (0.221275 0.21334 -0.469807)
      PathPoint add_brev_r_ins : femur_r (0.114304 0.275016 -0.553405)
    Schutte1993Muscle_Deprecated add_long_r: optimal_fiber_length=0.0987612 tendon_slack_length=0.1004027
        pennation_angle_at_optimal=0.1235693
      PathPoint add_long_r_ori : pelvis (0.211546 0.205317 -0.459688)
      PathPoint add_long_r_ins : femur_r (0.120119 0.268656 -0.625435)
    Schutte1993Muscle_Deprecated add_mag1_r: optimal_fiber_length=0.171196 tendon_slack_length=0.03380247
        pennation_angle_at_optimal=0.2567379
      PathPoint add_mag1_r_ori : pelvis (0.208052 0.242784 -0.486043)
      PathPoint add_mag1_r_ins : femur_r (0.113738 0.273205 -0.60934)
    Schutte1993Muscle_Deprecated add_mag2_r: optimal_fiber_length=0.2032647 tendon_slack_length=0.04598338
        pennation_angle_at_optimal=0.2412045
      PathPoint add_mag2_r_ori : pelvis (0.194053 0.264113 -0.490953)
      PathPoint add_mag2_r_ins : femur_r (0.118267 0.271751 -0.677297)
    Schutte1993Muscle_Deprecated add_mag3_r: optimal_fiber_length=0.1790684 tendon_slack_length=0.1852209
        pennation_angle_at_optimal=0.2073451
      PathPoint add_mag3_r_ori : pelvis (0.169953 0.290925 -0.487385)
      PathPoint add_mag3_r_ins : femur_r (0.157324 0.290987 -0.812338)
    Schutte1993Muscle_Deprecated bifemlh_r: optimal_fiber_length=0.08988498 tendon_slack_length=0.3266874
        pennation_angle_at_optimal=0.2021091
      PathPoint bifemlh_r_ori : pelvis (0.152434 0.292525 -0.465138)
      PathPoint bifemlh_r_via1 : femur_r (0.0885508 0.320293 -0.820171)
      PathPoint bifemlh_r_ins : femur_r (0.0808721 0.315903 -0.869249)
    Schutte1993Muscle_Deprecated gem_r: optimal_fiber_length=0.02253856 tendon_slack_length=0.03839115
        pennation_angle_at_optimal=0
      PathPoint gem_r_ori : pelvis (0.147958 0.291957 -0.444502)
      PathPoint gem_r_ins : femur_r (0.102091 0.254527 -0.432994)
    Schutte1993Muscle_Deprecated glut_max1_r: optimal_fiber_length=0.1996376 tendon_slack_length=0.007420671
        pennation_angle_at_optimal=0.3829252
      PathPoint glut_max1_r_ori : pelvis (0.181013 0.305122 -0.338908)
      PathPoint glut_max1_r_via1_pelvis : pelvis (0.129512 0.324748 -0.370241)
      PathPoint glut_max1_r_via2_femur : femur_r (0.098846 0.313942 -0.425138)
      PathPoint glut_max1_r_ins : femur_r (0.0989694 0.284095 -0.477153)
    Schutte1993Muscle_Deprecated glut_max2_r: optimal_fiber_length=0.2127569 tendon_slack_length=0.01819963
        pennation_angle_at_optimal=0.3829252
      PathPoint glut_max2_r_ori : pelvis (0.200414 0.328261 -0.372711)
      PathPoint glut_max2_r_via1_pelvis : pelvis (0.150781 0.341817 -0.426269)
      PathPoint glut_max2_r_via2_femur : femur_r (0.124142 0.328568 -0.468734)
      PathPoint glut_max2_r_ins : femur_r (0.106324 0.282168 -0.518036)
    Schutte1993Muscle_Deprecated glut_max3_r: optimal_fiber_length=0.2203189 tendon_slack_length=0.02451063
        pennation_angle_at_optimal=0.3829252
      PathPoint glut_max3_r_ori : pelvis (0.220357 0.343683 -0.409577)
      PathPoint glut_max3_r_via1_pelvis : pelvis (0.189645 0.351022 -0.465141)
      PathPoint glut_max3_via2_femur : femur_r (0.146603 0.33194 -0.528856)
      PathPoint glut_max3_r_ins : femur_r (0.109044 0.276974 -0.562365)
    Schutte1993Muscle_Deprecated glut_med1_r: optimal_fiber_length=0.07378753 tendon_slack_length=0.06084042
        pennation_angle_at_optimal=0.3572689
      PathPoint glut_med1v2 : pelvis (0.108919 0.233502 -0.320539)
      PathPoint glut_med1_r_ins_new : femur_r (0.0843838 0.265703 -0.436671)
    Schutte1993Muscle_Deprecated glut_med2_r: optimal_fiber_length=0.07596464 tendon_slack_length=0.0760254
        pennation_angle_at_optimal=0.3572689
      PathPoint glut_med2_v4 : pelvis (0.150242 0.268038 -0.303545)
      PathPoint glut_med2_r_ins_new : femur_r (0.0870167 0.268139 -0.431164)
    Schutte1993Muscle_Deprecated glut_med3_r: optimal_fiber_length=0.07332007 tendon_slack_length=0.05018515
        pennation_angle_at_optimal=0.3572689
      PathPoint glut_med3_r_v4 : pelvis (0.160672 0.279056 -0.341617)
      PathPoint glut_med3_r_ins_new : femur_r (0.0902071 0.276586 -0.430285)
    Schutte1993Muscle_Deprecated glut_min1_r: optimal_fiber_length=0.0648231 tendon_slack_length=0.03631655
        pennation_angle_at_optimal=0.1745329
      PathPoint glut_min1_r_ori : pelvis (0.119296 0.206142 -0.358404)
      PathPoint glut_min1_r_ins : femur_r (0.0878712 0.250989 -0.445039)
    Schutte1993Muscle_Deprecated glut_min2_r: optimal_fiber_length=0.05793442 tendon_slack_length=0.03318595
        pennation_angle_at_optimal=0
      PathPoint glut_min2_r_ori : pelvis (0.122324 0.233036 -0.352644)
      PathPoint glut_min2_r_ins : femur_r (0.0884389 0.250393 -0.4354)
    Schutte1993Muscle_Deprecated glut_min3_r: optimal_fiber_length=0.03775839 tendon_slack_length=0.05818327
        pennation_angle_at_optimal=0.01745329
      PathPoint glut_min3_r_ori : pelvis (0.140817 0.253975 -0.3462)
      PathPoint glut_min3_r_ins : femur_r (0.0951881 0.250522 -0.429533)
    Schutte1993Muscle_Deprecated grac_r: optimal_fiber_length=0.2430546 tendon_slack_length=0.1498146
        pennation_angle_at_optimal=0.1424189
      PathPoint grac_r_ori : pelvis (0.223275 0.229847 -0.478956)
      PathPoint grac_r_via1 : femur_r (0.155776 0.311605 -0.84046)
      PathPoint grac_r_via2 : femur_r (0.153327 0.29227 -0.881325)
      PathPoint grac_r_ins : femur_r (0.138391 0.276718 -0.891718)
    Schutte1993Muscle_Deprecated iliacus_r: optimal_fiber_length=0.04858263 tendon_slack_length=0.1297363
        pennation_angle_at_optimal=0.2494076
      PathPoint iliacus_r_ori : pelvis (0.146853 0.237078 -0.335379)
      PathPoint ìliacus_r_via1_pelvis : pelvis (0.154983 0.208078 -0.400799)
      PathPoint ìliacus_r_via2_pelvis : pelvis (0.155658 0.213305 -0.436233)
      PathPoint ìliacus_r_via3_femur : femur_r (0.147461 0.237306 -0.46383)
      PathPoint iliacus_r_ins : femur_r (0.131991 0.264606 -0.481247)
    Schutte1993Muscle_Deprecated pect_r: optimal_fiber_length=0.1530974 tendon_slack_length=0
        pennation_angle_at_optimal=0
      PathPoint pect_r_ori : pelvis (0.198628 0.203233 -0.445892)
      PathPoint pect_r_ins : femur_r (0.122782 0.272791 -0.511515)
    Schutte1993Muscle_Deprecated piri_r: optimal_fiber_length=0.02956242 tendon_slack_length=0.1129243
        pennation_angle_at_optimal=0.1745329
      PathPoint piri_r_ori : pelvis (0.209458 0.308865 -0.372958)
      PathPoint piri_via_pelvis : pelvis (0.160932 0.300333 -0.384824)
      PathPoint piri_r_ins : femur_r (0.101527 0.26933 -0.425947)
    Schutte1993Muscle_Deprecated psoas_r: optimal_fiber_length=0.04020779 tendon_slack_length=0.226912
        pennation_angle_at_optimal=0.1860521
      PathPoint psoas_r_ori : pelvis (0.209219 0.278925 -0.264068)
      PathPoint psoas_r_via1_pelvis : pelvis (0.167531 0.213529 -0.411763)
      PathPoint psoas_r_via2_pelvis : pelvis (0.161405 0.216207 -0.446335)
      PathPoint psoas_r_via3_femur : femur_r (0.150291 0.239863 -0.462288)
      PathPoint psoas_r_ins : femur_r (0.136742 0.274754 -0.479965)
    Schutte1993Muscle_Deprecated quad_fem_r: optimal_fiber_length=0.03911044 tendon_slack_length=0.02994442
        pennation_angle_at_optimal=0
      PathPoint quad_fem_r_ori : pelvis (0.17091 0.280687 -0.475728)
      PathPoint quad_fem_r_ins : femur_r (0.109592 0.287141 -0.452694)
    Schutte1993Muscle_Deprecated rect_fem_r: optimal_fiber_length=0.070665 tendon_slack_length=0.3418184
        pennation_angle_at_optimal=0.2431244
      PathPoint rect_fem_r_ori : pelvis (0.134227 0.207044 -0.399371)
      PathPoint rect_fem_r_ins : femur_r (0.124376 0.228268 -0.803443)
    Schutte1993Muscle_Deprecated sar_r: optimal_fiber_length=0.4905126 tendon_slack_length=0
        pennation_angle_at_optimal=0.02321288
      PathPoint sar_r_ori : pelvis (0.116993 0.18304 -0.363081)
      PathPoint sar_r_via1_femur : femur_r (0.164333 0.293352 -0.771648)
      PathPoint sar_r_2via_tibia : femur_r (0.16449 0.305418 -0.829131)
      PathPoint sar_r_via3_tibia : femur_r (0.162004 0.292772 -0.849893)
      PathPoint sar_r_ins : femur_r (0.132211 0.27273 -0.899674)
    Schutte1993Muscle_Deprecated semimem_r: optimal_fiber_length=0.06975779 tendon_slack_length=0.3676481
        pennation_angle_at_optimal=0.2633702
      PathPoint semimem_r_ori : pelvis (0.157908 0.284022 -0.470323)
      PathPoint semimem_r_via1 : femur_r (0.137962 0.323403 -0.835406)
      PathPoint semimem_r_ins : femur_r (0.14653 0.307521 -0.867346)
    Schutte1993Muscle_Deprecated semiten_r: optimal_fiber_length=0.1675401 tendon_slack_length=0.2746444
        pennation_angle_at_optimal=0.2244493
      PathPoint semiten_r_ori : pelvis (0.154138 0.2917 -0.467831)
      PathPoint semiten_r_via1 : femur_r (0.142909 0.328744 -0.787151)
      PathPoint semiten_r_via2 : femur_r (0.150023 0.319973 -0.840636)
      PathPoint semiten_r_via3 : femur_r (0.152619 0.306024 -0.890744)
      PathPoint semiten_r_ins : femur_r (0.136776 0.277627 -0.899609)
    Schutte1993Muscle_Deprecated tfl_r: optimal_fiber_length=0.09031015 tendon_slack_length=0.4411638
        pennation_angle_at_optimal=0.05235988
      PathPoint tfl_r_ori : pelvis (0.109949 0.190598 -0.348852)
      PathPoint tfl_via1_fem : femur_r (0.0904098 0.23835 -0.558578)
      PathPoint tfl_via2_fem : femur_r (0.0860156 0.268254 -0.779748)
      PathPoint tfl_r_ins : femur_r (0.0805461 0.276471 -0.871931)
  MarkerSet:
    Marker L_ASIS: pelvis (0.360151 0.181173 -0.35642)
    Marker R_ASIS: pelvis (0.117559 0.179181 -0.35879)
    Marker MID_ASIS: pelvis (0.238855 0.180177 -0.357605)
    Marker MID_PSIS: pelvis (0.239154 0.322031 -0.339033)
    Marker R_PSIS: pelvis (0.198585 0.320908 -0.337298)
    Marker L_PSIS: pelvis (0.279723 0.323154 -0.340768)
    Marker R_Med_Epi: femur_r (0.163134 0.279814 -0.830502)
    Marker R_Lat_Condyle: femur_r (0.0833642 0.286761 -0.823844)
    Marker Mid_Condyle: femur_r (0.123249 0.283287 -0.827173)
    Marker HJC: femur_r (0.143478 0.243439 -0.43267)
